Simulations: Version=204
  Folder Replacements
    Plant Soybean: PlantType=Soybean
      OrganArbitrator Arbitrator
        BiomassTypeArbitrator DMArbitration
          Folder PotentialPartitioningMethods
            ReallocationMethod
            AllocateFixationMethod
            RetranslocationMethod
            SendPotentialDMAllocationsMethod
          Folder AllocationMethods
            NutrientConstrainedAllocationMethod
            DryMatterAllocationsMethod
          RelativeAllocation ArbitrationMethod
        BiomassTypeArbitrator NArbitration
          Folder PotentialPartitioningMethods
            ReallocationMethod
          Folder ActualPartitioningMethods
            AllocateFixationMethod
            RetranslocationMethod
          Folder AllocationMethods
            NitrogenAllocationsMethod
          RelativeAllocation ArbitrationMethod
          AllocateUptakesMethod
        WaterUptakeMethod
        NitrogenUptakeMethod
      Phenology
        Memo Introduction
          In the new model we simplified phenology by taking out stages that are not measurable (e.g. end of juvenile stage) and by adding new stages that are measurable (e.g. start pod).
          The new phenology follows the V/R staging system.

          ![Alt Text](Diagrams_soy_phenology_comparison.png)

          **Figure [FigureNumber]:** Comparison of soybean phenological stages for APSIM Classic and APSIM Next Generation.
        Memo
          The key differences for cultivars are mostly phenological parameters (e.g., Vegetative.Target, ReproductivePhotoperiodModifier). In some cases, some additional parameters have been changed, see parameter values in the cultivar section.
        SubDailyInterpolation VegetativeThermalTime: agregationMethod=0
          XYPairs Response: X=[10, 20, 30, 40]; Y=[0, 10, 20, 0]
          ThreeHourAirTemperature InterpolationMethod
        LinearInterpolationFunction VegetativePhotoperiodModifier
          XYPairs: X=[14.43, 21.19]; Y=[1, 0]
          Memo
            These parameters are overridden by cultivar parameter descriptions to capture the difference between individual cultivars in terms of their phenological development.  Responses shown here are only indicative.  See cultivar descriptions for more information.
          VariableReference XValue: VariableName=[Phenology].Photoperiod
        SubDailyInterpolation ReproductiveThermalTime: agregationMethod=0
          XYPairs Response: X=[10, 15, 30, 40]; Y=[5, 5, 20, 0]
          ThreeHourAirTemperature InterpolationMethod
          Memo
            Cardinal temperatures for vegetative and reproductive thermal time are the same except the range of 0-15° C. A base temperature of 10° C is used for vegetative phase, which temperature has been used to calibrate 56 soybean cultivars in the USA ([ARCHONTOULIS2014465]) and 72 soybean cultivars in China ([WU2019125940]). The small changes in cardinal temperatures for reproductive thermal time was important for solving issues related to photoperiod response for some Australian cultivars. Such a differentiation in base temperature between V and R stages is supported by [BootChapter1998], DSSAT-CROPGRO soybean model, who showed that cardinal temperatures may differ for vegetative and reproductive development for soybean. This is something to further explore as new data from other environments are added to the APSIM NG database.
        LinearInterpolationFunction ReproductivePhotoperiodModifier: same as Replacements.Soybean.Phenology.VegetativePhotoperiodModifier
        PhaseLookup ThermalTime
          PhaseLookupValue PreEmergence: Start=Sowing; End=Emergence
            VariableReference Base: VariableName=[Phenology].VegetativeThermalTime
          PhaseLookupValue VegetativeGrowth: Start=Emergence; End=EndCanopyDevelopment
            MultiplyFunction TT
              VariableReference Base: VariableName=[Phenology].VegetativeThermalTime
              VariableReference PPModifier: VariableName=[Phenology].VegetativePhotoperiodModifier
          PhaseLookupValue ReproductiveGrowth: Start=EndCanopyDevelopment; End=HarvestRipe
            MultiplyFunction TT
              VariableReference Base: VariableName=[Phenology].ReproductiveThermalTime
              VariableReference PPModifier: VariableName=[Phenology].ReproductivePhotoperiodModifier
        PhotoperiodFunction Photoperiod: Twilight=0; DayLength=0
        GerminatingPhase Germinating: Start=Sowing; End=Germination; IsEmerged=false
          Constant MinSoilTemperature: FixedValue=0
        EmergingPhase Emerging: Start=Germination; End=Emergence; IsEmerged=false; TTForTimeStep=0
          VariableReference ThermalTime: VariableName=[Phenology].VegetativeThermalTime
          AddFunction Target
            Constant ShootLag: FixedValue=10
            MultiplyFunction DepthxRate
              VariableReference SowingDepth: VariableName=[Plant].SowingData.Depth
              Constant ShootRate: FixedValue=1
        GenericPhase Vegetative: Start=Emergence; End=StartFlowering; IsEmerged=true
          Constant Target: FixedValue=200
          VariableReference Progression: VariableName=[Phenology].ThermalTime
        GenericPhase EarlyFlowering: Start=StartFlowering; End=StartPodDevelopment; IsEmerged=true
          Memo
            The duration of the grain filling phase has been taken from the model of Robertson et al (2002).
          Constant Target: FixedValue=200
          VariableReference Progression: VariableName=[Phenology].ThermalTime
        GenericPhase EarlyPodDevelopment: Start=StartPodDevelopment; End=StartGrainFilling; IsEmerged=true
          Memo
            The duration of the grain filling phase has been taken from the model of Robertson et al (2002).
          Constant Target: FixedValue=140
          VariableReference Progression: VariableName=[Phenology].ThermalTime
        GenericPhase EarlyGrainFilling: Start=StartGrainFilling; End=EndCanopyDevelopment; IsEmerged=true
          MultiplyFunction Target
            Constant FractionofGrainfilling: FixedValue=0.05
            VariableReference EntireGrainfilling
              VariableName=[Phenology].LateGrainFilling.Target.EntireGrainfillPeriod.FixedValue
          VariableReference Progression: VariableName=[Phenology].ThermalTime
        GenericPhase MidGrainFilling: Start=EndCanopyDevelopment; End=EndPodDevelopment; IsEmerged=true
          MultiplyFunction Target
            Constant FractionofMidToLateGrainfilling: FixedValue=0.5
            SubtractFunction MidToLateGrainfilling
              VariableReference EntireGrainfilling
                VariableName=[Phenology].LateGrainFilling.Target.EntireGrainfillPeriod.FixedValue
              VariableReference EarlyGrainfilling: VariableName=[Phenology].EarlyGrainFilling.Target
          VariableReference Progression: VariableName=[Phenology].ThermalTime
        GenericPhase LateGrainFilling: Start=EndPodDevelopment; End=EndGrainFill; IsEmerged=true
          SubtractFunction Target
            Constant EntireGrainfillPeriod: FixedValue=500
            VariableReference EarlyGrainFillingTarget: VariableName=[Phenology].EarlyGrainFilling.Target
            VariableReference MidGrainFillingTarget: VariableName=[Phenology].MidGrainFilling.Target
          VariableReference Progression: VariableName=[Phenology].ThermalTime
        GenericPhase Maturing: Start=EndGrainFill; End=Maturity; IsEmerged=true
          Constant Target: FixedValue=45
          VariableReference Progression: VariableName=[Phenology].ThermalTime
        GenericPhase Ripening: Start=Maturity; End=HarvestRipe; IsEmerged=true
          Constant Target: FixedValue=45
          VariableReference Progression: VariableName=[Phenology].ThermalTime
        EndPhase ReadyForHarvesting: Start=HarvestRipe; End=Unused; IsEmerged=true
          VariableReference ThermalTime: VariableName=[Phenology].ThermalTime
        OnEventFunction EmergenceDAS: SetEvent=Emergence; ReSetEvent=never
          Memo
            A function is used to provide emergence date as days after sowing(DAS).
          Constant PreEventValue: FixedValue=0
          VariableReference PostEventValue: VariableName=[Plant].DaysAfterSowing
        OnEventFunction FloweringDAS: SetEvent=StartFlowering; ReSetEvent=never
          Memo
            A function is used to provide flowering date as days after sowing(DAS).
          Constant PreEventValue: FixedValue=0
          VariableReference PostEventValue: VariableName=[Plant].DaysAfterSowing
        OnEventFunction MaturityDAS: SetEvent=Maturity; ReSetEvent=never
          Memo
            A function is used to provide maturity date as days after sowing(DAS).
          Constant PreEventValue: FixedValue=0
          VariableReference PostEventValue: VariableName=[Plant].DaysAfterSowing
        OnEventFunction SeedFillingDAS: SetEvent=StartGrainFilling; ReSetEvent=never
          Memo
            A function is used to provide flowering date as days after sowing(DAS).
          Constant PreEventValue: FixedValue=0
          VariableReference PostEventValue: VariableName=[Plant].DaysAfterSowing
      SimpleLeaf Leaf: Albedo=0.25; Gsmax350=0.015; R50=150; LeafInitialisationStage=Emergence; Height=0; BaseHeight=0; Width=0; FRGR=0; PotentialEP=0; WaterDemand=0; KDead=0.2; LAIDead=0
        RUEModel Photosynthesis
          Constant RUE: FixedValue=1.2
            Memo
              This value has been fitted to available data. In contrast to Classic, the RUE value in NG refers to the whole plant (above and below ground) and the calibrated value is 1.2 g/MJ. There are no literature references for whole plant RUE in soybean. To come up with this value we considered: RUE for above ground biomass ([SINCLAIR198929]; [VANROEKEL20141189]), biomass and root data from Iowa FACTS experiments and model fitting to available data.
          WeightedTemperatureFunction FT: MaximumTemperatureWeighting=0.5
            XYPairs: X=[10, 20, 30, 40]; Y=[0, 1, 1, 0]
            Memo
              The function for temperature effect on RUE comes from APSIM classic, which seems to work well across diverse environments. We did not find any comments/suggestions in the published papers suggesting alternative ones, so for now we used the same function. As more data from different environments are added to APSIM database, it will be possible to further test the photosynthetic temperature response in the future.
          LinearInterpolationFunction FVPD
            XYPairs: X=[0, 10, 50]; Y=[1, 1, 1]
            VariableReference XValue: VariableName=[Leaf].Photosynthesis.VPD
          LinearInterpolationFunction FN
            XYPairs: X=[0, 1, 1.5]; Y=[0, 1, 1]
            VariableReference XValue: VariableName=[Leaf].Fn
          LinearInterpolationFunction FW
            XYPairs: X=[0, 1]; Y=[0, 1]
            VariableReference XValue: VariableName=[Leaf].Fw
          RUECO2Function FCO2: PhotosyntheticPathway=C3
          VariableReference RadnInt: VariableName=[Leaf].RadiationIntercepted
        StomatalConductanceCO2Modifier
          VariableReference PhotosynthesisCO2Modifier: VariableName=[Leaf].Photosynthesis.FCO2
        MultiplyFunction Area
          VariableReference SLA: VariableName=[Leaf].SpecificArea
          VariableReference LeafLiveWt: VariableName=[Leaf].Live.Wt
        MinimumFunction FRGR
          VariableReference RUE_FT: VariableName=[Leaf].Photosynthesis.FT
          VariableReference RUE_FN: VariableName=[Leaf].Photosynthesis.FN
          VariableReference RUE_FVPD: VariableName=[Leaf].Photosynthesis.FVPD
        LinearInterpolationFunction ExtinctionCoefficient
          XYPairs: X=[200, 1000]; Y=[0.6, 0.4]
          VariableReference XValue: VariableName=[Soybean].SowingData.RowSpacing
        LinearInterpolationFunction HeightFunction
          XYPairs: X=[1, 2, 3, 4, 5, 6, 9]; Y=[0, 0, 50, 400, 700, 900, 1000]
          VariableReference XValue: VariableName=[Phenology].Stage
        AddFunction NodeNumber
          Constant Initial: FixedValue=0
          AccumulateFunction Change: StartStageName=Emergence; EndStageName=EndCanopyDevelopment; FractionRemovedOnCut=1; FractionRemovedOnHarvest=1; FractionRemovedOnGraze=1; FractionRemovedOnPrune=0
            DivideFunction DeltaNode
              VariableReference ThermalTime: VariableName=[Phenology].VegetativeThermalTime
              VariableReference Phyllochron: VariableName=[Leaf].Phyllochron
        Constant NReallocationFactor: FixedValue=1
          Memo
            This model assumes that all metabolic and storage N is available for reallocation from senescing leaves.
        PhaseLookup SenescenceRate
          PhaseLookupValue Vegetative: Start=Emergence; End=EndCanopyDevelopment
            Constant Rate: FixedValue=0
          PhaseLookupValue Reproductive: Start=EndCanopyDevelopment; End=Maturity
            DivideFunction Rate
              VariableReference TT: VariableName=[Phenology].ThermalTime
              SubtractFunction TTRemaining
                ExpressionFunction TTRequired
                  Expression=[Phenology].MidGrainFilling.Target + [Phenology].LateGrainFilling.Target + [Phenology].Maturing.Target
                ExpressionFunction TTComplete
                  Expression=[Phenology].MidGrainFilling.ProgressThroughPhase + [Phenology].LateGrainFilling.ProgressThroughPhase + [Phenology].Maturing.ProgressThroughPhase
            Memo
              Leaf senescence rate is calculated to ensure that all leaves are senesced by crop maturity.
            Memo Memo1
              There is no data on detachment rates and so a simple value was chosen to ensure that leaves were not retained in the canopy. In the future, with more data available a thermal time basis leaf detachment rate will be explored.
        Constant DetachmentRate: FixedValue=0.05; Units=/d
        Constant InitialWt: FixedValue=1
        MultiplyFunction LAIDead
          VariableReference SLA: VariableName=[Leaf].SpecificArea
          VariableReference LeafDeadWt: VariableName=[Leaf].Dead.Wt
        LinearInterpolationFunction MaximumNConc
          XYPairs: X=[3, 4, 9]; Y=[0.06, 0.05, 0.03]
          VariableReference XValue: VariableName=[Phenology].Stage
          Memo
            These values have been fitted to the available data. The fitted values are within the observed maximum and minimum values obtained in the FACTS soybean experiments ([ARCHONTOULIS2020721]).
        LinearInterpolationFunction CriticalNConc
          XYPairs: X=[3, 4, 9]; Y=[0.06, 0.05, 0.03]
          VariableReference XValue: VariableName=[Phenology].Stage
        Constant MinimumNConc: FixedValue=0.02
        Constant MaintenanceRespiration: FixedValue=0; Units=0-1
        Constant DMConversionEfficiency: FixedValue=1; Units=0-1
        BiomassRemoval BiomassRemovalDefaults: HarvestFractionLiveToRemove=0; HarvestFractionDeadToRemove=0; HarvestFractionLiveToResidue=1; HarvestFractionDeadToResidue=1
        Constant NRetranslocationFactor: FixedValue=0.5
        Constant DMReallocationFactor: FixedValue=0
        Constant DMRetranslocationFactor: FixedValue=0
        Constant RemobilisationCost: FixedValue=0
        Constant CarbonConcentration: FixedValue=0.4
        NutrientDemandFunctions DMDemands
          DivideFunction Structural
            PhaseLookup DeltaLAIPotential
              Memo
                DeltaLAI describes the LAI variation over the cycle and is calculated using the Area of Largest Leaf, relative leaf area, plant number, branch number and leaf appearance rate (thermal time/phyllochron).
              PhaseLookupValue Vegetative: Start=Emergence; End=EndCanopyDevelopment
                MultiplyFunction Delta
                  VariableReference AreaLargestLeaf: VariableName=[Leaf].AreaLargestLeaf
                  PhaseLookup RelativeArea
                    PhaseLookupValue BeforeEndPod: Start=Emergence; End=StartPodDevelopment
                      LinearInterpolationFunction RelativeArea
                        XYPairs: X=[2, 7, 10, 18]; Y=[0.6666, 1, 1, 0.83]
                        VariableReference XValue: VariableName=[Leaf].NodeNumber
                    PhaseLookupValue AfterEndPod: Start=StartPodDevelopment; End=EndCanopyDevelopment
                      Constant RelativeArea: FixedValue=0.4
                  VariableReference PlantNumber: VariableName=[Soybean].SowingData.Population
                  LinearInterpolationFunction Branches
                    XYPairs: X=[0, 6, 7, 8, 9]; Y=[1, 1, 2, 2, 2]
                    VariableReference XValue: VariableName=[Leaf].NodeNumber
                  DivideFunction LAR
                    VariableReference TT: VariableName=[Phenology].VegetativeThermalTime
                    VariableReference Phyllochron: VariableName=[Leaf].Phyllochron
              PhaseLookupValue Reproductive: Start=EndCanopyDevelopment; End=Maturity
                Constant: FixedValue=0
            VariableReference SLA: VariableName=[Leaf].SpecificArea
            Memo
              Growth in leaf area is used to calculate the leaf dry matter demand. The same was assumed in the original crop models in APSIM. Further model development can be taken once new experimental data for metabolic, structural and storage forms are provided.
            Memo Memo1
              DeltaLAI describes the LAI variation over the cycle and is calculated using the Area of Largest Leaf, relative leaf area, plant number, branch number and leaf appearance rate (thermal time/phyllochron).
          Constant Storage: FixedValue=0
          Constant Metabolic: FixedValue=0
          Constant QStructuralPriority: FixedValue=1
          Constant QMetabolicPriority: FixedValue=1
          Constant QStoragePriority: FixedValue=1
        NutrientDemandFunctions NDemands
          MultiplyFunction Structural
            VariableReference MinNconc: VariableName=[Leaf].minimumNconc
            VariableReference PotentialDMAllocation: VariableName=[Leaf].potentialDMAllocation.Structural
          MultiplyFunction Metabolic
            SubtractFunction MetabolicNconc
              VariableReference CritNconc: VariableName=[Leaf].criticalNConc
              VariableReference MinNconc: VariableName=[Leaf].minimumNconc
            VariableReference PotentialDMAllocation: VariableName=[Leaf].potentialDMAllocation.Structural
          StorageNDemandFunction Storage
            Constant NitrogenDemandSwitch: FixedValue=1
            VariableReference MaxNconc: VariableName=[Leaf].maximumNconc
          Constant QStructuralPriority: FixedValue=1
          Constant QMetabolicPriority: FixedValue=1
          Constant QStoragePriority: FixedValue=1
        LinearInterpolationFunction FrostFraction
          XYPairs: X=[-4, 4]; Y=[1, 0]
          VariableReference XValue: VariableName=[Weather].MinT
        LinearInterpolationFunction SpecificArea
          XYPairs: X=[0.1, 6]; Y=[0.03, 0.03]
          VariableReference XValue: VariableName=[Leaf].LAI
        Constant AreaLargestLeaf: FixedValue=0.006
        Constant Phyllochron: FixedValue=45
      ReproductiveOrgan Grain: GrowthRespiration=0; MaintenanceRespiration=0
        Biomass Live
        Biomass Dead
        Constant PotentialHarvestIndex: FixedValue=0.5
        AddFunction FillingDuration
          VariableReference EarlyGrainFillingDuration: VariableName=[Phenology].EarlyGrainFilling.Target
          VariableReference MidGrainFillingDuration: VariableName=[Phenology].MidGrainFilling.Target
          VariableReference LateGrainFillingDuration: VariableName=[Phenology].LateGrainFilling.Target
        PhaseLookup DMDemandFunction
          PhaseLookupValue GrainFilling: Start=StartGrainFilling; End=EndGrainFill
            MultiplyFunction HIGrainDemand
              VariableReference AboveGroundWt: VariableName=[AboveGround].Wt
              DivideFunction HarvestIndexIncrease
                VariableReference PotentialHarvestIndex: VariableName=[Grain].PotentialHarvestIndex
                VariableReference FillingDuration: VariableName=[Grain].FillingDuration
              VariableReference ThermalTime: VariableName=[Phenology].ThermalTime
        Constant MinimumNConc: FixedValue=0.05
        Constant MaximumNConc: FixedValue=0.058
        Constant WaterContent: FixedValue=0.12
        MultiplyFunction NFillingRate
          VariableReference NConc: VariableName=[Grain].MaximumNConc
          VariableReference DMDemand: VariableName=[Grain].DMDemandFunction
          VariableReference DMConversionEfficiency: VariableName=[Grain].DMConversionEfficiency
        BiomassRemoval BiomassRemovalDefaults: HarvestFractionLiveToRemove=1; HarvestFractionDeadToRemove=1; HarvestFractionLiveToResidue=0; HarvestFractionDeadToResidue=0
        Constant DMConversionEfficiency: FixedValue=0.89
        Constant RemobilisationCost: FixedValue=0
        Constant CarbonConcentration: FixedValue=0.4
        DivideFunction HarvestIndex
          VariableReference GrainWt: VariableName=[Grain].Wt
          VariableReference AboveGroundWt: VariableName=[AboveGround].Wt
        Constant MaximumPotentialGrainSize: FixedValue=0
          Memo
            This parameter is not used.  Grain growth is calculated from harvest index increase.
        Constant NumberFunction: FixedValue=0
          Memo
            Grain number is not estimated by this model.
        NutrientPoolFunctions DMDemandPriorityFactors
          Constant Structural: FixedValue=1
          Constant Metabolic: FixedValue=1
          Constant Storage: FixedValue=1
        NutrientPoolFunctions NDemandPriorityFactors: same as Replacements.Soybean.Grain.DMDemandPriorityFactors
      Root: GrowthRespiration=0; MaintenanceRespiration=0
        MultiplyFunction RootFrontVelocity
          PhaseLookup PotentialRootFrontVelocity
            PhaseLookupValue PreEmergence: Start=Germination; End=Emergence
              Constant Function: FixedValue=5
            PhaseLookupValue early: Start=Emergence; End=StartGrainFilling
              Constant Function: FixedValue=30
            PhaseLookupValue late: Start=StartGrainFilling; End=Maturity
              Constant Function: FixedValue=5
          LinearInterpolationFunction WaterFactor
            SoilWaterScale: LLModel=1
            XYPairs: X=[0, 0.25, 1]; Y=[1, 1, 1]
            VariableReference XValue: VariableName=[SoilWaterScale]
          LinearInterpolationFunction AFPSFactor
            XYPairs: X=[0, 0.03, 1]; Y=[1, 1, 1]
            VariableReference XValue: VariableName=[Root].AirFilledPoreSpace
        Constant MaximumRootDepth: FixedValue=1000000
          Memo
            There is no intrinsic limit to maximum rooting depth.  Roots will be limited by the depth of the soil profile, or via values of XF in each layer.
        RootShapeCylinder RootShape
        Constant KLModifier: FixedValue=1; Units=0-1
          Memo
            No modification to water extraction rate is assumed in this model.
        LinearInterpolationFunction MaxDailyNUptake
          XYPairs: X=[0, 5]; Y=[1, 3]
          VariableReference XValue: VariableName=[Leaf].LAI
        Constant SenescenceRate: FixedValue=0.005; Units=/d
          Memo
            Roots are assumed to simply senesce at a small and constant rate during the entire growth period.
        Constant MaximumNConc: FixedValue=0.01
        Constant MinimumNConc: FixedValue=0.005
        PhaseLookupValue NitrogenDemandSwitch: Start=Emergence; End=EndGrainFill
          Constant: FixedValue=1
        Constant KNO3: FixedValue=0.02
        Constant KNH4: FixedValue=0
          Memo
            The current model version considers only NO3 uptake but NH4 option can be activated by the user . We do not expect activation of NH4 to change total plant N uptake because the nitrification rate (conversion of NH4 to NO3) is very fast in the model. In the future we will re-valuate this.
        BiomassRemoval BiomassRemovalDefaults: HarvestFractionLiveToRemove=0; HarvestFractionDeadToRemove=0; HarvestFractionLiveToResidue=0.2; HarvestFractionDeadToResidue=0
        LinearInterpolationFunction NUptakeSWFactor
          XYPairs: X=[0, 1]; Y=[0, 1]
          VariableReference XValue: VariableName=[Root].RWC
        Constant SpecificRootLength: FixedValue=40; Units=m/g
        Constant DMConversionEfficiency: FixedValue=1
        Constant MaintenanceRespirationFunction: FixedValue=1
        Constant RemobilisationCost: FixedValue=0
        Constant CarbonConcentration: FixedValue=0.4
        NutrientDemandFunctions DMDemands
          MultiplyFunction Structural
            PartitionFractionDemandFunction DMDemandFunction
              PhaseLookup PartitionFraction
                PhaseLookupValue Early: Start=Emergence; End=StartFlowering
                  Constant Function: FixedValue=0.2
                PhaseLookupValue Middle: Start=StartFlowering; End=StartGrainFilling
                  Constant Function: FixedValue=0.2
                PhaseLookupValue Late: Start=StartGrainFilling; End=Maturity
                  Constant Function: FixedValue=0.05
            Constant StructuralFraction: FixedValue=1
          Constant Metabolic: FixedValue=0
          StorageDMDemandFunction Storage
            SubtractFunction StorageFraction
              Constant One: FixedValue=1
              VariableReference StructuralFraction: VariableName=[Root].DMDemands.Structural.StructuralFraction
          Constant QStructuralPriority: FixedValue=1
          Constant QMetabolicPriority: FixedValue=1
          Constant QStoragePriority: FixedValue=1
        NutrientDemandFunctions NDemands
          MultiplyFunction Structural
            VariableReference MinNconc: VariableName=[Root].minimumNconc
            VariableReference PotentialDMAllocation: VariableName=[Root].potentialDMAllocation.Structural
          MultiplyFunction Metabolic
            SubtractFunction MetabolicNconc
              VariableReference CritNconc: VariableName=[Root].criticalNConc
              VariableReference MinNconc: VariableName=[Root].minimumNconc
            VariableReference PotentialDMAllocation: VariableName=[Root].potentialDMAllocation.Structural
          StorageNDemandFunction Storage
            VariableReference NitrogenDemandSwitch: VariableName=[Root].nitrogenDemandSwitch
            VariableReference MaxNconc: VariableName=[Root].maximumNconc
          Constant QStructuralPriority: FixedValue=1
          Constant QMetabolicPriority: FixedValue=1
          Constant QStoragePriority: FixedValue=1
        VariableReference CriticalNConc: VariableName=[Root].MinimumNConc
        NutrientPoolFunctions InitialWt
          Constant Structural: FixedValue=0.2; Units=g/plant
          Constant Metabolic: FixedValue=0
          Constant Storage: FixedValue=0
      Nodule
        Constant FixationMetabolicCost: FixedValue=0
        Constant MaximumNConc: FixedValue=0.02
        Constant MinimumNConc: FixedValue=0.01
        Constant SenescenceRate: FixedValue=0
        Constant NReallocationFactor: FixedValue=0
        PhaseLookupValue NitrogenDemandSwitch: Start=Emergence; End=EndGrainFill
          Constant: FixedValue=1
        BiomassRemoval BiomassRemovalDefaults: HarvestFractionLiveToRemove=0; HarvestFractionDeadToRemove=0; HarvestFractionLiveToResidue=0.2; HarvestFractionDeadToResidue=0
        Constant InitialWtFunction: FixedValue=0; Units=g/m^2
        Constant DetachmentRateFunction: FixedValue=0; Units=/d
        Constant MaintenanceRespirationFunction: FixedValue=0; Units=0-1
        Constant DMConversionEfficiency: FixedValue=1; Units=0-1
        Constant NRetranslocationFactor: FixedValue=0
        Constant DMReallocationFactor: FixedValue=0
        Constant DMRetranslocationFactor: FixedValue=0
        VariableReference CriticalNConc: VariableName=[Nodule].MinimumNConc
        Constant RemobilisationCost: FixedValue=0
        Constant CarbonConcentration: FixedValue=0.4
        HoldFunction FixationRate: WhenToHold=StartGrainFilling
          MinimumFunction DailyPotentialFixationRate
            MultiplyFunction PotentialFixationRate
              VariableReference LiveBiomass: VariableName=[AboveGroundLive].Wt
              PhaseLookup SpecificFixationRate
                PhaseLookupValue VegetativeGrowth: Start=Emergence; End=StartFlowering
                  Constant Rate: FixedValue=0.006
                PhaseLookupValue ReproductiveGrowth: Start=StartFlowering; End=EndGrainFill
                  Constant Rate: FixedValue=0.002
            Constant MaximumFixationRate: FixedValue=0.6; Units=g/g
        NutrientPoolFunctions DMDemands
          MultiplyFunction Structural
            PartitionFractionDemandFunction DMDemandFunction
              PhaseLookup PartitionFraction
                PhaseLookupValue Early: Start=Emergence; End=StartFlowering
                  Constant Function: FixedValue=0.03
                PhaseLookupValue Middle: Start=StartFlowering; End=StartGrainFilling
                  Constant Function: FixedValue=0.02
                PhaseLookupValue Late: Start=StartGrainFilling; End=Maturity
                  Constant Function: FixedValue=0
            Constant StructuralFraction: FixedValue=1; Units=g/g
          Constant Metabolic: FixedValue=0
          StorageDMDemandFunction Storage
            SubtractFunction StorageFraction
              Constant One: FixedValue=1
              VariableReference StructuralFraction: VariableName=[Nodule].DMDemands.Structural.StructuralFraction
        NutrientPoolFunctions NDemands
          MultiplyFunction Structural
            VariableReference MinNconc: VariableName=[Nodule].minimumNconc
            VariableReference PotentialDMAllocation: VariableName=[Nodule].potentialDMAllocation.Structural
          MultiplyFunction Metabolic
            SubtractFunction MetabolicNconc
              VariableReference CritNconc: VariableName=[Nodule].criticalNConc
              VariableReference MinNconc: VariableName=[Nodule].minimumNconc
            VariableReference PotentialDMAllocation: VariableName=[Nodule].potentialDMAllocation.Structural
          StorageNDemandFunction Storage
            VariableReference NitrogenDemandSwitch: VariableName=[Nodule].nitrogenDemandSwitch
            VariableReference MaxNconc: VariableName=[Nodule].maximumNconc
      GenericOrgan Shell: IsAboveGround=true
        Constant NReallocationFactor: FixedValue=1
        Constant NRetranslocationFactor: FixedValue=0.5
        Constant MaximumNConc: FixedValue=0.045
        VariableReference CriticalNConc: VariableName=[Shell].MinimumNConc
        Constant MinimumNConc: FixedValue=0.01
        Constant DMRetranslocationFactor: FixedValue=0.1
        PhaseLookupValue NitrogenDemandSwitch: Start=StartPodDevelopment; End=EndPodDevelopment
          Constant: FixedValue=1
        BiomassRemoval BiomassRemovalDefaults: HarvestFractionLiveToRemove=0; HarvestFractionDeadToRemove=0; HarvestFractionLiveToResidue=1; HarvestFractionDeadToResidue=1
        PhaseLookup SenescenceRate
          PhaseLookupValue ReproductivePhase: Start=StartPodDevelopment; End=Maturity
            MinimumFunction Rate
              DivideFunction Fraction
                VariableReference TT: VariableName=[Phenology].ThermalTime
                SubtractFunction TTRemaining
                  ExpressionFunction ReproductiveTT
                    Expression=[Phenology].EarlyPodDevelopment.Target+[Phenology].EarlyGrainFilling.Target+[Phenology].MidGrainFilling.Target+[Phenology].LateGrainFilling.Target
                  ExpressionFunction ReproductiveTT1Complete
                    Expression=[Phenology].EarlyPodDevelopment.ProgressThroughPhase+[Phenology].EarlyGrainFilling.ProgressThroughPhase+[Phenology].MidGrainFilling.ProgressThroughPhase+[Phenology].LateGrainFilling.ProgressThroughPhase
              Constant One: FixedValue=1
        Constant DetachmentRateFunction: FixedValue=0; Units=/d
        Constant MaintenanceRespirationFunction: FixedValue=0; Units=0-1
        Constant DMConversionEfficiency: FixedValue=1; Units=0-1
        Constant DMReallocationFactor: FixedValue=0
        Constant RemobilisationCost: FixedValue=0
        Constant CarbonConcentration: FixedValue=0.4
        Constant PotentialHarvestIndex: FixedValue=0.2
        AddFunction FillingDuration
          VariableReference EarlyPodDevelopmentDuration: VariableName=[Phenology].EarlyPodDevelopment.Target
          VariableReference EarlyGrainFillingDuration: VariableName=[Phenology].EarlyGrainFilling.Target
          VariableReference MidGrainFillingDuration: VariableName=[Phenology].MidGrainFilling.Target
        NutrientDemandFunctions DMDemands
          MultiplyFunction Structural
            PhaseLookup DMDemandFunction
              PhaseLookupValue PodDevelopment: Start=StartPodDevelopment; End=EndPodDevelopment
                MultiplyFunction HIPodDemand
                  VariableReference AboveGroundWt: VariableName=[AboveGround].Wt
                  DivideFunction HarvestIndexIncrease
                    VariableReference PotentialHarvestIndex: VariableName=[Shell].PotentialHarvestIndex
                    VariableReference FillingDuration: VariableName=[Shell].FillingDuration
                  VariableReference ThermalTime: VariableName=[Phenology].ThermalTime
            Constant StructuralFraction: FixedValue=1
            Memo
              Shell harvest index is used to calculate shell biomass demand, which follows the same approach than grain harvest index. It represents the fraction of shell biomass in relation to total aboveground biomass.
          Constant Metabolic: FixedValue=0
          StorageDMDemandFunction Storage
            SubtractFunction StorageFraction
              Constant One: FixedValue=1
              VariableReference StructuralFraction: VariableName=[Shell].DMDemands.Structural.StructuralFraction
          Constant QStructuralPriority: FixedValue=1
          Constant QMetabolicPriority: FixedValue=1
          Constant QStoragePriority: FixedValue=1
        NutrientDemandFunctions NDemands
          MultiplyFunction Structural
            VariableReference MinNconc: VariableName=[Shell].minimumNconc
            VariableReference PotentialDMAllocation: VariableName=[Shell].potentialDMAllocation.Structural
          StorageNDemandFunction Storage
            VariableReference NitrogenDemandSwitch: VariableName=[Shell].nitrogenDemandSwitch
            VariableReference MaxNconc: VariableName=[Shell].maximumNconc
          Constant Metabolic: FixedValue=0
          Constant QStructuralPriority: FixedValue=1
          Constant QMetabolicPriority: FixedValue=1
          Constant QStoragePriority: FixedValue=1
        RetranslocateNonStructural RetranslocateNitrogen
        NutrientPoolFunctions InitialWt
          Constant Structural: FixedValue=0; Units=g/m^2
          Constant Metabolic: FixedValue=0
          Constant Storage: FixedValue=0
        Constant Photosynthesis: FixedValue=0
        VariableReference initialNConcFunction: VariableName=[Shell].MinimumNConc
      GenericOrgan Stem: IsAboveGround=true
        Constant NReallocationFactor: FixedValue=1
        Constant NRetranslocationFactor: FixedValue=0.5
        PhaseLookup DMRetranslocationFactor
          PhaseLookupValue GrainFilling: Start=EndCanopyDevelopment; End=EndGrainFill
            Constant RetranslocationFactor: FixedValue=0.2
        LinearInterpolationFunction MaximumNConc
          XYPairs: X=[3, 4, 5]; Y=[0.025, 0.02, 0.015]
          VariableReference XValue: VariableName=[Phenology].Stage
        Constant MinimumNConc: FixedValue=0.006
        PhaseLookupValue NitrogenDemandSwitch: Start=Emergence; End=StartGrainFilling
          Memo
            There is no evidence of stem N storage during grain filling. Also, there is no stem structural growth during this time.
          Constant: FixedValue=1
        BiomassRemoval BiomassRemovalDefaults: HarvestFractionLiveToRemove=0; HarvestFractionDeadToRemove=0; HarvestFractionLiveToResidue=1; HarvestFractionDeadToResidue=1
        PhaseLookup SenescenceRate
          PhaseLookupValue PostCanopyPhase: Start=EndCanopyDevelopment; End=Maturity
            MinimumFunction Rate
              DivideFunction Fraction
                VariableReference TT: VariableName=[Phenology].ThermalTime
                SubtractFunction TTRemaining
                  ExpressionFunction PostCanopyTT
                    Expression=[Phenology].EarlyPodDevelopment.Target+[Phenology].EarlyGrainFilling.Target+[Phenology].MidGrainFilling.Target+[Phenology].LateGrainFilling.Target
                  ExpressionFunction PostCanopyTTComplete
                    Expression=[Phenology].MidGrainFilling.ProgressThroughPhase+[Phenology].LateGrainFilling.ProgressThroughPhase
              Constant One: FixedValue=1
        Constant DetachmentRateFunction: FixedValue=0; Units=/d
        Constant MaintenanceRespirationFunction: FixedValue=0; Units=0-1
        Constant DMConversionEfficiency: FixedValue=1; Units=0-1
        Constant DMReallocationFactor: FixedValue=0
        VariableReference CriticalNConc: VariableName=[Stem].MinimumNConc
        Constant RemobilisationCost: FixedValue=0
        Constant CarbonConcentration: FixedValue=0.4
        NutrientDemandFunctions DMDemands
          MultiplyFunction Structural
            PhaseLookup Fraction
              PhaseLookupValue StemGrowthPhase: Start=Emergence; End=StartPodDevelopment
                Constant Fraction: FixedValue=0.75
              PhaseLookupValue PodAndGrainGrowth: Start=StartPodDevelopment; End=EndGrainFill
                Constant Fraction: FixedValue=0
            VariableReference DMDemand: VariableName=[Stem].PotentialGrowth
          Constant Metabolic: FixedValue=0
          MultiplyFunction Storage
            VariableReference DMDemand: VariableName=[Stem].PotentialGrowth
            SubtractFunction StorageFraction
              Constant One: FixedValue=1
              VariableReference StructuralFraction: VariableName=[Stem].DMDemands.Structural.Fraction
          Constant QStructuralPriority: FixedValue=1
          Constant QMetabolicPriority: FixedValue=1
          Constant QStoragePriority: FixedValue=1
        NutrientDemandFunctions NDemands
          MultiplyFunction Structural
            VariableReference MinNconc: VariableName=[Stem].minimumNconc
            VariableReference PotentialDMAllocation: VariableName=[Stem].potentialDMAllocation.Structural
          MultiplyFunction Metabolic
            SubtractFunction MetabolicNconc
              VariableReference CritNconc: VariableName=[Stem].criticalNConc
              VariableReference MinNconc: VariableName=[Stem].minimumNconc
            VariableReference PotentialDMAllocation: VariableName=[Stem].potentialDMAllocation.Structural
          StorageNDemandFunction Storage
            VariableReference NitrogenDemandSwitch: VariableName=[Stem].nitrogenDemandSwitch
            VariableReference MaxNconc: VariableName=[Stem].maximumNconc
          Constant QStructuralPriority: FixedValue=1
          Constant QMetabolicPriority: FixedValue=1
          Constant QStoragePriority: FixedValue=1
        PartitionFractionDemandFunction PotentialGrowth
          PhaseLookup PartitionFraction
            PhaseLookupValue StemGrowthPhase: Start=Emergence; End=EndPodDevelopment
              Constant StemFraction: FixedValue=0.4
            PhaseLookupValue GrainFilling: Start=EndPodDevelopment; End=EndGrainFill
              Constant StemFraction: FixedValue=0
        RetranslocateNonStructural RetranslocateNitrogen
        NutrientPoolFunctions InitialWt: same as Replacements.Soybean.Shell.InitialWt
        Constant Photosynthesis: FixedValue=0
        VariableReference initialNConcFunction: VariableName=[Stem].MinimumNConc
      CompositeBiomass AboveGround: OrganNames=[Leaf, Stem, Grain, Shell]; IncludeLive=true; IncludeDead=true
      CompositeBiomass BelowGround: OrganNames=[Root, Nodule]; IncludeLive=true; IncludeDead=true
      CompositeBiomass AboveGroundLive: OrganNames=[Leaf, Stem, Grain, Shell]; IncludeLive=true; IncludeDead=false
      CompositeBiomass Total: OrganNames=[Leaf, Stem, Grain, Shell, Root, Nodule]; IncludeLive=true; IncludeDead=true
      CompositeBiomass TotalLive: OrganNames=[Leaf, Stem, Grain, Shell, Root, Nodule]; IncludeLive=true; IncludeDead=false
      CompositeBiomass TotalDead: OrganNames=[Leaf, Stem, Grain, Shell, Root, Nodule]; IncludeLive=false; IncludeDead=true
      CompositeBiomass Pod: OrganNames=[Shell, Grain]; IncludeLive=true; IncludeDead=true
      Constant MortalityRate: FixedValue=0
      Constant SeedMortalityRate: FixedValue=0
      Folder Cultivars
        Folder Australia
          Cultivar Buchanan
            Command:
              [Phenology].Vegetative.Target.FixedValue = 480
              [Phenology].EarlyFlowering.Target.FixedValue = 100
              [Phenology].EarlyGrainFilling.Target.FractionofGrainfilling.FixedValue = 0.015
              [Phenology].LateGrainFilling.Target.EntireGrainfillPeriod.FixedValue = 467
              [Phenology].VegetativePhotoperiodModifier.XYPairs.X = 12.39, 15.61
              [Phenology].ReproductivePhotoperiodModifier.XYPairs.X = 12.39, 15.61
              [Phenology].MidGrainFilling.Target.FractionofMidToLateGrainfilling.FixedValue=0.33
              [Grain].MaximumNConc.FixedValue = 0.067
              [Stem].PotentialGrowth.PartitionFraction.StemGrowthPhase.StemFraction.FixedValue = 0.5
              [Leaf].AreaLargestLeaf.FixedValue=0.009
          Cultivar Djakal
            Command:
              [Phenology].Vegetative.Target.FixedValue = 380
              [Phenology].EarlyFlowering.Target.FixedValue = 100
              [Phenology].EarlyGrainFilling.Target.FractionofGrainfilling.FixedValue = 0.05
              [Phenology].LateGrainFilling.Target.EntireGrainfillPeriod.FixedValue = 405
              [Phenology].VegetativePhotoperiodModifier.XYPairs.X = 13.75, 17
              [Phenology].ReproductivePhotoperiodModifier.XYPairs.X = 11.9, 15.5
              [Leaf].AreaLargestLeaf.FixedValue=0.009
          Cultivar Davis
            Command:
              [Phenology].Vegetative.Target.FixedValue = 480
              [Phenology].EarlyFlowering.Target.FixedValue = 100
              [Phenology].EarlyGrainFilling.Target.FractionofGrainfilling.FixedValue = 0.015
              [Phenology].LateGrainFilling.Target.EntireGrainfillPeriod.FixedValue = 467
              [Phenology].VegetativePhotoperiodModifier.XYPairs.X = 12.39, 15.61
              [Phenology].ReproductivePhotoperiodModifier.XYPairs.X = 12.39, 15.61
              [Phenology].MidGrainFilling.Target.FractionofMidToLateGrainfilling.FixedValue=0.33
              [Grain].MaximumNConc.FixedValue = 0.067
              [Stem].PotentialGrowth.PartitionFraction.StemGrowthPhase.StemFraction.FixedValue = 0.5
              [Leaf].AreaLargestLeaf.FixedValue=0.012
          Cultivar Hooper_MG40
            Command:
              [Phenology].Vegetative.Target.FixedValue = 380
              [Phenology].EarlyFlowering.Target.FixedValue = 80
              [Phenology].EarlyGrainFilling.Target.FractionofGrainfilling.FixedValue = 0.05
              [Phenology].LateGrainFilling.Target.EntireGrainfillPeriod.FixedValue = 440
              [Phenology].VegetativePhotoperiodModifier.XYPairs.X = 13.26, 16.67
              [Phenology].ReproductivePhotoperiodModifier.XYPairs.X = 13.26, 16.67
              [Leaf].AreaLargestLeaf.FixedValue=0.009
          Cultivar Stephens_MG40
            Command:
              [Phenology].Vegetative.Target.FixedValue = 360
              [Phenology].EarlyFlowering.Target.FixedValue = 80
              [Phenology].EarlyGrainFilling.Target.FractionofGrainfilling.FixedValue = 0.05
              [Phenology].LateGrainFilling.Target.EntireGrainfillPeriod.FixedValue = 440
              [Phenology].VegetativePhotoperiodModifier.XYPairs.X = 13.26, 16.67
              [Phenology].ReproductivePhotoperiodModifier.XYPairs.X = 13.26, 16.67
              [Leaf].AreaLargestLeaf.FixedValue=0.009
          Cultivar FiskebyV
            Command:
              [Phenology].Vegetative.Target.FixedValue = 285
              [Phenology].EarlyFlowering.Target.FixedValue = 80
              [Phenology].EarlyGrainFilling.Target.FractionofGrainfilling.FixedValue = 0.05
              [Phenology].LateGrainFilling.Target.EntireGrainfillPeriod.FixedValue = 405
              [Phenology].VegetativePhotoperiodModifier.XYPairs.X = 13.75, 18
              [Phenology].ReproductivePhotoperiodModifier.XYPairs.X = 13.75, 18
            Memo
              Early-maturing, photoperiod-insensitive cultivar developed in Sweden for high latitude environments
          Cultivar F148_7
            Command:
              [Phenology].Vegetative.Target.FixedValue = 314
              [Phenology].EarlyFlowering.Target.FixedValue = 80
              [Phenology].EarlyGrainFilling.Target.FractionofGrainfilling.FixedValue = 0.05
              [Phenology].LateGrainFilling.Target.EntireGrainfillPeriod.FixedValue = 485
              [Phenology].VegetativePhotoperiodModifier.XYPairs.X = 13.75, 17
              [Phenology].ReproductivePhotoperiodModifier.XYPairs.X = 12, 18
              [Leaf].AreaLargestLeaf.FixedValue=0.009
            Memo
              Indeterminate breeding selection from the national soybean breeding program combining phytophthora resistance, earliness,
              culinary quality, and yield
          Cultivar Bowyer
            Command:
              [Phenology].Vegetative.Target.FixedValue = 377
              [Phenology].EarlyFlowering.Target.FixedValue = 80
              [Phenology].EarlyGrainFilling.Target.FractionofGrainfilling.FixedValue = 0.05
              [Phenology].LateGrainFilling.Target.EntireGrainfillPeriod.FixedValue = 405
              [Phenology].VegetativePhotoperiodModifier.XYPairs.X = 13.75, 15.5
              [Phenology].ReproductivePhotoperiodModifier.XYPairs.X = 11.9, 15.5
            Memo
              Brown hilum cultivar, adapted to southern New South Wales, released by K McWhirter in 1982
          Cultivar Bunya
            Command:
              [Phenology].Vegetative.Target.FixedValue = 550
              [Phenology].EarlyFlowering.Target.FixedValue = 80
              [Phenology].EarlyGrainFilling.Target.FractionofGrainfilling.FixedValue = 0.05
              [Phenology].LateGrainFilling.Target.EntireGrainfillPeriod.FixedValue = 405
              [Phenology].VegetativePhotoperiodModifier.XYPairs.X = 13.75, 18
              [Phenology].ReproductivePhotoperiodModifier.XYPairs.X = 10.9, 15.5
              [Leaf].AreaLargestLeaf.FixedValue=0.009
            Memo
              Culinary cultivar released in 2006 by CSIRO with broad adaptation from northern New South Wales to northern Queensland
          Cultivar Cowrie
            Command:
              [Phenology].Vegetative.Target.FixedValue = 390
              [Phenology].EarlyFlowering.Target.FixedValue = 80
              [Phenology].EarlyGrainFilling.Target.FractionofGrainfilling.FixedValue = 0.05
              [Phenology].LateGrainFilling.Target.EntireGrainfillPeriod.FixedValue = 425
              [Phenology].VegetativePhotoperiodModifier.XYPairs.X = 12.75, 16
              [Phenology].ReproductivePhotoperiodModifier.XYPairs.X = 12.75, 16
              [Leaf].AreaLargestLeaf.FixedValue=0.009
            Memo
              Light hilum cultivar released by theNewSouth Wales Department of Agriculture for the coastal Northern Rivers District inNewSouth Wales
          Cultivar Soya791
            Command:
              [Phenology].Vegetative.Target.FixedValue = 430
              [Phenology].EarlyFlowering.Target.FixedValue = 80
              [Phenology].EarlyGrainFilling.Target.FractionofGrainfilling.FixedValue = 0.05
              [Phenology].LateGrainFilling.Target.EntireGrainfillPeriod.FixedValue = 425
              [Phenology].VegetativePhotoperiodModifier.XYPairs.X = 12.75, 15.3
              [Phenology].ReproductivePhotoperiodModifier.XYPairs.X = 12.75, 15.3
              [Leaf].AreaLargestLeaf.FixedValue=0.009
          Cultivar Manark
            Command:
              [Phenology].Vegetative.Target.FixedValue = 440
              [Phenology].EarlyFlowering.Target.FixedValue = 80
              [Phenology].EarlyGrainFilling.Target.FractionofGrainfilling.FixedValue = 0.05
              [Phenology].LateGrainFilling.Target.EntireGrainfillPeriod.FixedValue = 425
              [Phenology].VegetativePhotoperiodModifier.XYPairs.X = 12.75, 15
              [Phenology].ReproductivePhotoperiodModifier.XYPairs.X = 12.75, 15
              [Leaf].AreaLargestLeaf.FixedValue=0.009
          Cultivar Warrigal
            Command:
              [Phenology].Vegetative.Target.FixedValue = 490
              [Phenology].EarlyFlowering.Target.FixedValue = 80
              [Phenology].EarlyGrainFilling.Target.FractionofGrainfilling.FixedValue = 0.05
              [Phenology].LateGrainFilling.Target.EntireGrainfillPeriod.FixedValue = 425
              [Phenology].VegetativePhotoperiodModifier.XYPairs.X = 12.75, 15
              [Phenology].ReproductivePhotoperiodModifier.XYPairs.X = 12.75, 15
              [Leaf].AreaLargestLeaf.FixedValue=0.009
          Cultivar Leichhardt
            Command:
              [Phenology].Vegetative.Target.FixedValue = 806
              [Phenology].EarlyFlowering.Target.FixedValue = 80
              [Phenology].EarlyGrainFilling.Target.FractionofGrainfilling.FixedValue = 0.05
              [Phenology].LateGrainFilling.Target.EntireGrainfillPeriod.FixedValue = 425
              [Phenology].VegetativePhotoperiodModifier.XYPairs.X = 12.75, 14.7
              [Phenology].ReproductivePhotoperiodModifier.XYPairs.X = 12.75, 14.7
              [Leaf].AreaLargestLeaf.FixedValue=0.009
          Cultivar Djakal1
            Command:
              [Phenology].Vegetative.Target.FixedValue = 332
              [Phenology].EarlyFlowering.Target.FixedValue = 80
              [Phenology].EarlyGrainFilling.Target.FractionofGrainfilling.FixedValue = 0.05
              [Phenology].LateGrainFilling.Target.EntireGrainfillPeriod.FixedValue = 440
              [Phenology].VegetativePhotoperiodModifier.XYPairs.X = 13.26, 16.67
              [Phenology].ReproductivePhotoperiodModifier.XYPairs.X = 13.26, 16.67
              [Leaf].AreaLargestLeaf.FixedValue=0.009
        Folder USA
          Cultivar Trial_MG00
            Command:
              [Phenology].Vegetative.Target.FixedValue = 268
              [Phenology].EarlyFlowering.Target.FixedValue = 76
              [Phenology].EarlyGrainFilling.Target.FractionofGrainfilling.FixedValue = 0.05
              [Phenology].LateGrainFilling.Target.EntireGrainfillPeriod.FixedValue = 432
              [Phenology].VegetativePhotoperiodModifier.XYPairs.X = 14.43, 21.19
              [Phenology].ReproductivePhotoperiodModifier.XYPairs.X = 14.43, 21.19
          Cultivar Lambert_MG0
            Command:
              [Phenology].Vegetative.Target.FixedValue = 294
              [Phenology].EarlyFlowering.Target.FixedValue = 81
              [Phenology].EarlyGrainFilling.Target.FractionofGrainfilling.FixedValue = 0.05
              [Phenology].LateGrainFilling.Target.EntireGrainfillPeriod.FixedValue = 442
              [Phenology].VegetativePhotoperiodModifier.XYPairs.X = 14.29, 20.14
              [Phenology].ReproductivePhotoperiodModifier.XYPairs.X = 14.29, 20.14
          Cultivar IA1006_MG10
            Command:
              [Phenology].Vegetative.Target.FixedValue = 336
              [Phenology].EarlyFlowering.Target.FixedValue = 118
              [Phenology].EarlyGrainFilling.Target.FractionofGrainfilling.FixedValue = 0.05
              [Phenology].LateGrainFilling.Target.EntireGrainfillPeriod.FixedValue = 518
              [Phenology].VegetativePhotoperiodModifier.XYPairs.X = 14.37, 19.30
              [Phenology].ReproductivePhotoperiodModifier.XYPairs.X = 14.37, 19.30
          Cultivar IA2008_MG20
            Command:
              [Phenology].Vegetative.Target.FixedValue = 329
              [Phenology].EarlyFlowering.Target.FixedValue = 150
              [Phenology].EarlyGrainFilling.Target.FractionofGrainfilling.FixedValue = 0.05
              [Phenology].LateGrainFilling.Target.EntireGrainfillPeriod.FixedValue = 580
              [Phenology].VegetativePhotoperiodModifier.XYPairs.X = 13.92, 17.93
              [Phenology].ReproductivePhotoperiodModifier.XYPairs.X = 13.92, 17.93
          Cultivar PioneerP22T61_MG22
            Command:
              [Phenology].Vegetative.Target.FixedValue = 328
              [Phenology].EarlyFlowering.Target.FixedValue = 106
              [Phenology].EarlyGrainFilling.Target.FractionofGrainfilling.FixedValue = 0.3
              [Phenology].LateGrainFilling.Target.EntireGrainfillPeriod.FixedValue = 499
              [Phenology].VegetativePhotoperiodModifier.XYPairs.X = 13.59, 17.6
              [Phenology].ReproductivePhotoperiodModifier.XYPairs.X = 13.59, 17.6
          Cultivar PioneerP22T69R_MG22
            Command:
              [Phenology].Vegetative.Target.FixedValue = 328
              [Phenology].EarlyFlowering.Target.FixedValue = 106
              [Phenology].EarlyGrainFilling.Target.FractionofGrainfilling.FixedValue = 0.35
              [Phenology].LateGrainFilling.Target.EntireGrainfillPeriod.FixedValue = 580
              [Phenology].VegetativePhotoperiodModifier.XYPairs.X = 13.59, 17.6
              [Phenology].ReproductivePhotoperiodModifier.XYPairs.X = 13.59, 17.6
          Cultivar Pioneer92MGI_MG26
            Command:
              [Phenology].Vegetative.Target.FixedValue = 271
              [Phenology].EarlyFlowering.Target.FixedValue = 120
              [Phenology].EarlyGrainFilling.Target.FractionofGrainfilling.FixedValue = 0.125
              [Phenology].LateGrainFilling.Target.EntireGrainfillPeriod.FixedValue = 529
              [Phenology].VegetativePhotoperiodModifier.XYPairs.X = 13.77, 17.57
              [Phenology].ReproductivePhotoperiodModifier.XYPairs.X = 13.77, 17.57
          Cultivar PioneerP92Y75_MG27
            Command:
              [Phenology].Vegetative.Target.FixedValue = 328
              [Phenology].EarlyFlowering.Target.FixedValue = 106
              [Phenology].EarlyGrainFilling.Target.FractionofGrainfilling.FixedValue = 0.14
              [Phenology].LateGrainFilling.Target.EntireGrainfillPeriod.FixedValue = 499
              [Phenology].VegetativePhotoperiodModifier.XYPairs.X = 13.59, 17.6
              [Phenology].ReproductivePhotoperiodModifier.XYPairs.X = 13.59, 17.6
          Cultivar Macon_MG30
            Command:
              [Phenology].Vegetative.Target.FixedValue = 367
              [Phenology].EarlyFlowering.Target.FixedValue = 163
              [Phenology].EarlyGrainFilling.Target.FractionofGrainfilling.FixedValue = 0.175
              [Phenology].LateGrainFilling.Target.EntireGrainfillPeriod.FixedValue = 607
              [Phenology].VegetativePhotoperiodModifier.XYPairs.X = 14.05, 17.56
              [Phenology].ReproductivePhotoperiodModifier.XYPairs.X = 14.05, 17.56
          Cultivar PioneerP93M11_MG31
            Command:
              [Phenology].Vegetative.Target.FixedValue = 250
              [Phenology].EarlyFlowering.Target.FixedValue = 110
              [Phenology].EarlyGrainFilling.Target.FractionofGrainfilling.FixedValue = 0.30
              [Phenology].LateGrainFilling.Target.EntireGrainfillPeriod.FixedValue = 457
              [Phenology].VegetativePhotoperiodModifier.XYPairs.X = 13.4, 16.0
              [Phenology].ReproductivePhotoperiodModifier.XYPairs.X = 13.4, 16.0
              [Grain].MaximumNConc.FixedValue = 0.065
              [Shell].PotentialHarvestIndex.FixedValue = 0.5
              [Leaf].AreaLargestLeaf.FixedValue=0.013
          Cultivar Becks321NRR_MG32
            Command:
              [Phenology].Vegetative.Target.FixedValue = 272
              [Phenology].EarlyFlowering.Target.FixedValue = 117
              [Phenology].EarlyGrainFilling.Target.FractionofGrainfilling.FixedValue = 0.20
              [Phenology].LateGrainFilling.Target.EntireGrainfillPeriod.FixedValue = 522
              [Phenology].VegetativePhotoperiodModifier.XYPairs.X = 13.45, 18.0
              [Phenology].ReproductivePhotoperiodModifier.XYPairs.X = 13.45, 18.0
          Cultivar PioneerP932T16R_MG32
            Command:
              [Phenology].Vegetative.Target.FixedValue = 328
              [Phenology].EarlyFlowering.Target.FixedValue = 106
              [Phenology].EarlyGrainFilling.Target.FractionofGrainfilling.FixedValue = 0.40
              [Phenology].LateGrainFilling.Target.EntireGrainfillPeriod.FixedValue = 499
              [Phenology].VegetativePhotoperiodModifier.XYPairs.X = 13.59, 17.6
              [Phenology].ReproductivePhotoperiodModifier.XYPairs.X = 13.59, 17.6
          Cultivar Becks367NRR_MG37
            Command:
              [Phenology].Vegetative.Target.FixedValue = 267
              [Phenology].EarlyFlowering.Target.FixedValue = 112
              [Phenology].EarlyGrainFilling.Target.FractionofGrainfilling.FixedValue = 0.26
              [Phenology].LateGrainFilling.Target.EntireGrainfillPeriod.FixedValue = 506
              [Phenology].VegetativePhotoperiodModifier.XYPairs.X = 13.27, 17.2
              [Phenology].ReproductivePhotoperiodModifier.XYPairs.X = 13.27, 17.2
          Cultivar AsgrowAG4403_MG40
            Command:
              [Phenology].Vegetative.Target.FixedValue = 292
              [Phenology].EarlyFlowering.Target.FixedValue = 123
              [Phenology].EarlyGrainFilling.Target.FractionofGrainfilling.FixedValue = 0.30
              [Phenology].LateGrainFilling.Target.EntireGrainfillPeriod.FixedValue = 535
              [Phenology].VegetativePhotoperiodModifier.XYPairs.X = 13.09, 16.49
              [Phenology].ReproductivePhotoperiodModifier.XYPairs.X = 13.09, 16.49
          Cultivar HornbeckHBK4891_MG40: same as Replacements.Soybean.Cultivars.USA.AsgrowAG4403_MG40
          Cultivar Pioneer94B01_MG40
            Command:
              [Phenology].Vegetative.Target.FixedValue = 322
              [Phenology].EarlyFlowering.Target.FixedValue = 143
              [Phenology].EarlyGrainFilling.Target.FractionofGrainfilling.FixedValue = 0.30
              [Phenology].LateGrainFilling.Target.EntireGrainfillPeriod.FixedValue = 567
              [Phenology].VegetativePhotoperiodModifier.XYPairs.X = 13.05, 16.46
              [Phenology].ReproductivePhotoperiodModifier.XYPairs.X = 13.05, 16.46
          Cultivar PioneerP9504_MG50
            Command:
              [Phenology].Vegetative.Target.FixedValue = 404
              [Phenology].EarlyFlowering.Target.FixedValue = 112
              [Phenology].EarlyGrainFilling.Target.FractionofGrainfilling.FixedValue = 0.30
              [Phenology].LateGrainFilling.Target.EntireGrainfillPeriod.FixedValue = 505
              [Phenology].VegetativePhotoperiodModifier.XYPairs.X = 12.83, 16.13
              [Phenology].ReproductivePhotoperiodModifier.XYPairs.X = 12.83, 16.13
          Cultivar AsgrowAG5701_MG50
            Command:
              [Phenology].Vegetative.Target.FixedValue = 404
              [Phenology].EarlyFlowering.Target.FixedValue = 131
              [Phenology].EarlyGrainFilling.Target.FractionofGrainfilling.FixedValue = 0.30
              [Phenology].LateGrainFilling.Target.EntireGrainfillPeriod.FixedValue = 549
              [Phenology].VegetativePhotoperiodModifier.XYPairs.X = 12.83, 16.13
              [Phenology].ReproductivePhotoperiodModifier.XYPairs.X = 12.83, 16.13
          Cultivar Hutcheson_MG50
            Command:
              [Phenology].Vegetative.Target.FixedValue = 438
              [Phenology].EarlyFlowering.Target.FixedValue = 112
              [Phenology].EarlyGrainFilling.Target.FractionofGrainfilling.FixedValue = 0.30
              [Phenology].LateGrainFilling.Target.EntireGrainfillPeriod.FixedValue = 505
              [Phenology].VegetativePhotoperiodModifier.XYPairs.X = 12.58, 15.88
              [Phenology].ReproductivePhotoperiodModifier.XYPairs.X = 12.58, 15.88
          Cultivar NK622_MG60
            Command:
              [Phenology].Vegetative.Target.FixedValue = 436
              [Phenology].EarlyFlowering.Target.FixedValue = 93
              [Phenology].EarlyGrainFilling.Target.FractionofGrainfilling.FixedValue = 0.30
              [Phenology].LateGrainFilling.Target.EntireGrainfillPeriod.FixedValue = 467
              [Phenology].VegetativePhotoperiodModifier.XYPairs.X = 12.39, 15.61
              [Phenology].ReproductivePhotoperiodModifier.XYPairs.X = 12.39, 15.61
        Folder China
          Cultivar Nandou12
            Command:
              [Phenology].Vegetative.Target.FixedValue = 500
              [Phenology].EarlyFlowering.Target.FixedValue = 120
              [Phenology].EarlyPodDevelopment.Target.FixedValue = 180
              [Phenology].EarlyGrainFilling.Target.FractionofGrainfilling.FixedValue = 0.2
              [Phenology].LateGrainFilling.Target.EntireGrainfillPeriod.FixedValue = 440
              [Phenology].VegetativePhotoperiodModifier.XYPairs.X = 12.63, 15.13
              [Phenology].ReproductivePhotoperiodModifier.XYPairs.X = 12.63, 15.13
              [Phenology].MidGrainFilling.Target.FractionofMidToLateGrainfilling.FixedValue=0.45
              [Leaf].AreaLargestLeaf.FixedValue=0.013
              [Grain].PotentialHarvestIndex.FixedValue=0.35
          Cultivar Texuan13
            Command:
              [Phenology].Vegetative.Target.FixedValue = 500
              [Phenology].EarlyFlowering.Target.FixedValue = 200
              [Phenology].EarlyPodDevelopment.Target.FixedValue = 170
              [Phenology].EarlyGrainFilling.Target.FractionofGrainfilling.FixedValue = 0.2
              [Phenology].LateGrainFilling.Target.EntireGrainfillPeriod.FixedValue = 460
              [Phenology].VegetativePhotoperiodModifier.XYPairs.X = 12.63, 15.13
              [Phenology].ReproductivePhotoperiodModifier.XYPairs.X = 12.63, 15.13
              [Phenology].MidGrainFilling.Target.FractionofMidToLateGrainfilling.FixedValue=0.45
              [Leaf].AreaLargestLeaf.FixedValue=0.013
              [Grain].PotentialHarvestIndex.FixedValue=0.35
          Cultivar Jiuyuehuang
            Command:
              [Phenology].Vegetative.Target.FixedValue = 540
              [Phenology].EarlyFlowering.Target.FixedValue = 140
              [Phenology].EarlyPodDevelopment.Target.FixedValue = 140
              [Phenology].EarlyGrainFilling.Target.FractionofGrainfilling.FixedValue = 0.2
              [Phenology].LateGrainFilling.Target.EntireGrainfillPeriod.FixedValue = 420
              [Phenology].VegetativePhotoperiodModifier.XYPairs.X = 12.94, 15.44
              [Phenology].ReproductivePhotoperiodModifier.XYPairs.X = 12.94, 15.44
              [Phenology].MidGrainFilling.Target.FractionofMidToLateGrainfilling.FixedValue=0.45
              [Leaf].AreaLargestLeaf.FixedValue=0.013
              [Grain].PotentialHarvestIndex.FixedValue=0.25
          Cultivar Hedou19
            Command:
              [Phenology].Vegetative.Target.FixedValue = 370
              [Phenology].EarlyFlowering.Target.FixedValue = 120
              [Phenology].EarlyPodDevelopment.Target.FixedValue = 180
              [Phenology].EarlyGrainFilling.Target.FractionofGrainfilling.FixedValue = 0.361
              [Phenology].LateGrainFilling.Target.EntireGrainfillPeriod.FixedValue = 600
              [Phenology].VegetativePhotoperiodModifier.XYPairs.X = 13.57, 16.07
              [Phenology].ReproductivePhotoperiodModifier.XYPairs.X = 13.57, 16.07
              [Phenology].MidGrainFilling.Target.FractionofMidToLateGrainfilling.FixedValue=0.45
              [Leaf].AreaLargestLeaf.FixedValue=0.02
              [Leaf].Phyllochron.FixedValue=45
        Folder Generic
          Cultivar Generic_MG000
            Command:
              [Phenology].Vegetative.Target.FixedValue = 310
              [Phenology].EarlyFlowering.Target.FixedValue = 100
              [Phenology].EarlyGrainFilling.Target.FractionofGrainfilling.FixedValue = 0.475
              [Phenology].LateGrainFilling.Target.EntireGrainfillPeriod.FixedValue = 590
              [Phenology].VegetativePhotoperiodModifier.XYPairs.X = 14.6, 22.35
              [Phenology].ReproductivePhotoperiodModifier.XYPairs.X = 14.6, 22.35
          Cultivar Generic_MG00
            Command:
              [Phenology].Vegetative.Target.FixedValue = 320
              [Phenology].EarlyFlowering.Target.FixedValue = 100
              [Phenology].EarlyGrainFilling.Target.FractionofGrainfilling.FixedValue = 0.467
              [Phenology].LateGrainFilling.Target.EntireGrainfillPeriod.FixedValue = 600
              [Phenology].VegetativePhotoperiodModifier.XYPairs.X = 14.35, 21.11
              [Phenology].ReproductivePhotoperiodModifier.XYPairs.X = 14.35, 21.11
          Cultivar Generic_MG0
            Command:
              [Phenology].Vegetative.Target.FixedValue = 336
              [Phenology].EarlyFlowering.Target.FixedValue = 120
              [Phenology].EarlyGrainFilling.Target.FractionofGrainfilling.FixedValue = 0.422
              [Phenology].LateGrainFilling.Target.EntireGrainfillPeriod.FixedValue = 616
              [Phenology].VegetativePhotoperiodModifier.XYPairs.X = 14.1, 19.95
              [Phenology].ReproductivePhotoperiodModifier.XYPairs.X = 14.1, 19.95
          Cultivar Generic_MG1
            Command:
              [Phenology].Vegetative.Target.FixedValue = 340
              [Phenology].EarlyFlowering.Target.FixedValue = 120
              [Phenology].EarlyGrainFilling.Target.FractionofGrainfilling.FixedValue = 0.411
              [Phenology].LateGrainFilling.Target.EntireGrainfillPeriod.FixedValue = 632
              [Phenology].VegetativePhotoperiodModifier.XYPairs.X = 13.84, 18.77
              [Phenology].ReproductivePhotoperiodModifier.XYPairs.X = 13.84, 18.77
          Cultivar Generic_MG2
            Command:
              [Phenology].Vegetative.Target.FixedValue = 348
              [Phenology].EarlyFlowering.Target.FixedValue = 120
              [Phenology].EarlyGrainFilling.Target.FractionofGrainfilling.FixedValue = 0.386
              [Phenology].LateGrainFilling.Target.EntireGrainfillPeriod.FixedValue = 648
              [Phenology].VegetativePhotoperiodModifier.XYPairs.X = 13.59, 17.61
              [Phenology].ReproductivePhotoperiodModifier.XYPairs.X = 13.59, 17.61
          Cultivar Generic_MG3
            Command:
              [Phenology].Vegetative.Target.FixedValue = 380
              [Phenology].EarlyFlowering.Target.FixedValue = 120
              [Phenology].EarlyGrainFilling.Target.FractionofGrainfilling.FixedValue = 0.361
              [Phenology].LateGrainFilling.Target.EntireGrainfillPeriod.FixedValue = 664
              [Phenology].VegetativePhotoperiodModifier.XYPairs.X = 13.4, 16.91
              [Phenology].ReproductivePhotoperiodModifier.XYPairs.X = 13.4, 16.91
          Cultivar Generic_MG4
            Command:
              [Phenology].Vegetative.Target.FixedValue = 388
              [Phenology].EarlyFlowering.Target.FixedValue = 140
              [Phenology].EarlyGrainFilling.Target.FractionofGrainfilling.FixedValue = 0.324
              [Phenology].LateGrainFilling.Target.EntireGrainfillPeriod.FixedValue = 664
              [Phenology].VegetativePhotoperiodModifier.XYPairs.X = 13.1, 16.49
              [Phenology].ReproductivePhotoperiodModifier.XYPairs.X = 13.1, 16.49
          Cultivar Generic_MG5
            Command:
              [Phenology].Vegetative.Target.FixedValue = 396
              [Phenology].EarlyFlowering.Target.FixedValue = 160
              [Phenology].EarlyGrainFilling.Target.FractionofGrainfilling.FixedValue = 0.072
              [Phenology].LateGrainFilling.Target.EntireGrainfillPeriod.FixedValue = 696
              [Phenology].VegetativePhotoperiodModifier.XYPairs.X = 12.83, 16.13
              [Phenology].ReproductivePhotoperiodModifier.XYPairs.X = 12.83, 16.13
          Cultivar Generic_MG6
            Command:
              [Phenology].Vegetative.Target.FixedValue = 404
              [Phenology].EarlyFlowering.Target.FixedValue = 180
              [Phenology].EarlyGrainFilling.Target.FractionofGrainfilling.FixedValue = 0.056
              [Phenology].LateGrainFilling.Target.EntireGrainfillPeriod.FixedValue = 712
              [Phenology].VegetativePhotoperiodModifier.XYPairs.X = 12.58, 15.8
              [Phenology].ReproductivePhotoperiodModifier.XYPairs.X = 12.58, 15.8
          Cultivar Generic_MG7
            Command:
              [Phenology].Vegetative.Target.FixedValue = 416
              [Phenology].EarlyFlowering.Target.FixedValue = 200
              [Phenology].EarlyGrainFilling.Target.FractionofGrainfilling.FixedValue = 0.055
              [Phenology].LateGrainFilling.Target.EntireGrainfillPeriod.FixedValue = 728
              [Phenology].VegetativePhotoperiodModifier.XYPairs.X = 12.33, 15.46
              [Phenology].ReproductivePhotoperiodModifier.XYPairs.X = 12.33, 15.46
          Cultivar Generic_MG8
            Command:
              [Phenology].Vegetative.Target.FixedValue = 430
              [Phenology].EarlyFlowering.Target.FixedValue = 200
              [Phenology].EarlyGrainFilling.Target.FractionofGrainfilling.FixedValue = 0.054
              [Phenology].LateGrainFilling.Target.EntireGrainfillPeriod.FixedValue = 744
              [Phenology].VegetativePhotoperiodModifier.XYPairs.X = 12.07, 15.1
              [Phenology].ReproductivePhotoperiodModifier.XYPairs.X = 12.07, 15.1
          Cultivar Generic_MG9
            Command:
              [Phenology].Vegetative.Target.FixedValue = 460
              [Phenology].EarlyFlowering.Target.FixedValue = 200
              [Phenology].EarlyGrainFilling.Target.FractionofGrainfilling.FixedValue = 0.053
              [Phenology].LateGrainFilling.Target.EntireGrainfillPeriod.FixedValue = 748
              [Phenology].VegetativePhotoperiodModifier.XYPairs.X = 11.88, 14.82
              [Phenology].ReproductivePhotoperiodModifier.XYPairs.X = 11.88, 14.82
          Cultivar Generic_MG10
            Command:
              [Phenology].Vegetative.Target.FixedValue = 470
              [Phenology].EarlyFlowering.Target.FixedValue = 200
              [Phenology].EarlyGrainFilling.Target.FractionofGrainfilling.FixedValue = 0.053
              [Phenology].LateGrainFilling.Target.EntireGrainfillPeriod.FixedValue = 748
              [Phenology].VegetativePhotoperiodModifier.XYPairs.X = 11.78, 14.65
              [Phenology].ReproductivePhotoperiodModifier.XYPairs.X = 11.78, 14.65
      Folder Elli
        Cultivar Elli_early0
          Command:
            [Phenology].Vegetative.Target.FixedValue =445.403514402704
            [Phenology].EarlyFlowering.Target.FixedValue =94.8955626621876
            [Phenology].EarlyGrainFilling.Target.FractionofGrainfilling.FixedValue =0.518766681314296
            [Phenology].LateGrainFilling.Target.EntireGrainfillPeriod.FixedValue =336.954913172177
            [Phenology].ReproductivePhotoperiodModifier.XYPairs.X =18.3204626888951, 20.6105959736821
        Cultivar Elli_late0
          Command:
            [Phenology].Vegetative.Target.FixedValue =448.637892251011
            [Phenology].EarlyFlowering.Target.FixedValue =131.990310715332
            [Phenology].EarlyGrainFilling.Target.FractionofGrainfilling.FixedValue =0.270526203966038
            [Phenology].LateGrainFilling.Target.EntireGrainfillPeriod.FixedValue =390.023774742495
            [Phenology].ReproductivePhotoperiodModifier.XYPairs.X =17.1614577518014, 20.1389862786347
        Cultivar Elli_early1: same as Replacements.Soybean.Cultivars.Generic.Generic_MG1
        Cultivar Elli_late1
          Command:
            [Phenology].Vegetative.Target.FixedValue =598.351512559594
            [Phenology].EarlyFlowering.Target.FixedValue =122.562658810028
            [Phenology].EarlyGrainFilling.Target.FractionofGrainfilling.FixedValue =0.450559614667584
            [Phenology].LateGrainFilling.Target.EntireGrainfillPeriod.FixedValue =409.545922512725
            [Phenology].ReproductivePhotoperiodModifier.XYPairs.X =14.3462494885037, 15.6695556826686
        Cultivar Elli_early2
          Command:
            [Phenology].Vegetative.Target.FixedValue =513.213960233976
            [Phenology].EarlyFlowering.Target.FixedValue =153.055107484018
            [Phenology].EarlyGrainFilling.Target.FractionofGrainfilling.FixedValue =0.318476964399548
            [Phenology].LateGrainFilling.Target.EntireGrainfillPeriod.FixedValue =365.467887790089
            [Phenology].ReproductivePhotoperiodModifier.XYPairs.X =12.9580156638313, 14.4497454342911
        Cultivar Elli_late2
          Command:
            [Phenology].Vegetative.Target.FixedValue =570.262585690819
            [Phenology].EarlyFlowering.Target.FixedValue =180.340020349991
            [Phenology].EarlyGrainFilling.Target.FractionofGrainfilling.FixedValue =0.255893591091458
            [Phenology].LateGrainFilling.Target.EntireGrainfillPeriod.FixedValue =463.602140318426
            [Phenology].ReproductivePhotoperiodModifier.XYPairs.X =14.5695475373602, 15.2633666917923
        Cultivar Elli_early3
          Command:
            [Phenology].Vegetative.Target.FixedValue =444.234646271777
            [Phenology].EarlyFlowering.Target.FixedValue =132.932699385638
            [Phenology].EarlyGrainFilling.Target.FractionofGrainfilling.FixedValue =0.353393852456366
            [Phenology].LateGrainFilling.Target.EntireGrainfillPeriod.FixedValue =602.240467132903
            [Phenology].ReproductivePhotoperiodModifier.XYPairs.X =12.8837625854681, 15.8075551722332
        Cultivar Elli_late3
          Command:
            [Phenology].Vegetative.Target.FixedValue =-215.431484140394
            [Phenology].EarlyFlowering.Target.FixedValue =90.5588523285255
            [Phenology].EarlyGrainFilling.Target.FractionofGrainfilling.FixedValue =0.569503019009612
            [Phenology].LateGrainFilling.Target.EntireGrainfillPeriod.FixedValue =804.104453553544
            [Phenology].ReproductivePhotoperiodModifier.XYPairs.X =18.4824671002031, 26.2651453333203
        Cultivar Elli_early4
          Command:
            [Phenology].Vegetative.Target.FixedValue =402.806607964415
            [Phenology].EarlyFlowering.Target.FixedValue =158.106992912356
            [Phenology].EarlyGrainFilling.Target.FractionofGrainfilling.FixedValue =0.279991851425449
            [Phenology].LateGrainFilling.Target.EntireGrainfillPeriod.FixedValue =604.146128857631
            [Phenology].ReproductivePhotoperiodModifier.XYPairs.X =15.1370174643136, 17.4021875093142
        Cultivar Elli_late4
          Command:
            [Phenology].Vegetative.Target.FixedValue =-129.811223254147
            [Phenology].EarlyFlowering.Target.FixedValue =148.672018424817
            [Phenology].EarlyGrainFilling.Target.FractionofGrainfilling.FixedValue =0.386237354380619
            [Phenology].LateGrainFilling.Target.EntireGrainfillPeriod.FixedValue =823.585547597943
            [Phenology].ReproductivePhotoperiodModifier.XYPairs.X =18.4185386649377, 25.750972294171
        Cultivar Elli_early5
          Command:
            [Phenology].Vegetative.Target.FixedValue =375.946822959077
            [Phenology].EarlyFlowering.Target.FixedValue =427.85652552261
            [Phenology].EarlyGrainFilling.Target.FractionofGrainfilling.FixedValue =-0.0163045443765545
            [Phenology].LateGrainFilling.Target.EntireGrainfillPeriod.FixedValue =479.353124033339
            [Phenology].ReproductivePhotoperiodModifier.XYPairs.X =11.8647813510481, 24.4825713269504
        Cultivar Elli_late5
          Command:
            [Phenology].Vegetative.Target.FixedValue =81.5013871512045
            [Phenology].EarlyFlowering.Target.FixedValue =599.735335893164
            [Phenology].EarlyGrainFilling.Target.FractionofGrainfilling.FixedValue =0.0689066875558805
            [Phenology].LateGrainFilling.Target.EntireGrainfillPeriod.FixedValue =596.09811601808
            [Phenology].ReproductivePhotoperiodModifier.XYPairs.X =16.1206637512114, 17.2850454067876
        Cultivar Elli_early6
          Command:
            [Phenology].Vegetative.Target.FixedValue =1058.8571397264
            [Phenology].EarlyFlowering.Target.FixedValue =413.224775468311
            [Phenology].EarlyGrainFilling.Target.FractionofGrainfilling.FixedValue =0.00949120473531278
            [Phenology].LateGrainFilling.Target.EntireGrainfillPeriod.FixedValue =-303.585479481812
            [Phenology].ReproductivePhotoperiodModifier.XYPairs.X =8.04613538578085, 25.3373965973441
        Cultivar Elli_late6
          Command:
            [Phenology].Vegetative.Target.FixedValue =161.865685082341
            [Phenology].EarlyFlowering.Target.FixedValue =-78.5965431088324
            [Phenology].EarlyGrainFilling.Target.FractionofGrainfilling.FixedValue =0.0827292851386373
            [Phenology].LateGrainFilling.Target.EntireGrainfillPeriod.FixedValue =1143.11840044387
            [Phenology].ReproductivePhotoperiodModifier.XYPairs.X =17.495770243875, 19.8109416286602
        Cultivar Elli_early7
          Command:
            [Phenology].Vegetative.Target.FixedValue =309.442922464762
            [Phenology].EarlyFlowering.Target.FixedValue =198.077415183648
            [Phenology].EarlyGrainFilling.Target.FractionofGrainfilling.FixedValue =0.062790205761651
            [Phenology].LateGrainFilling.Target.EntireGrainfillPeriod.FixedValue =780.622972333968
            [Phenology].ReproductivePhotoperiodModifier.XYPairs.X =12.9965673936601, 15.0504869828724
        Cultivar Elli_late7
          Command:
            [Phenology].Vegetative.Target.FixedValue =700.215769495909
            [Phenology].EarlyFlowering.Target.FixedValue =277.170441061578
            [Phenology].EarlyGrainFilling.Target.FractionofGrainfilling.FixedValue =-0.00113436231357837
            [Phenology].LateGrainFilling.Target.EntireGrainfillPeriod.FixedValue =365.676742139313
            [Phenology].ReproductivePhotoperiodModifier.XYPairs.X =13.7873506179886, 17.8046131781726
  DataStore
  Simulation
    Clock: Start=2012-03-08; End=2012-12-07
    Summary summaryfile
    Weather: FileName=./weather/Stoneville.met
    SoilArbitrator Soil Arbitrator
    Zone Field: Area=1; Slope=0; AspectAngle=0; Altitude=50
      Fertiliser
      Soil Bosket (askew):568730: SoilType=Bosket (askew):568730; State=MS; Country=USA; ApsoilNumber=0; Latitude=33.42; Longitude=-90.915
        DataSource=SSURGO (https://sdmdataaccess.nrcs.usda.gov/) through R package soilDB, R package apsimx function ssurgo2sp. Timestamp 2025-11-14 14:42:54.182301
        Comments=cokey = 27014014 - acres percent = 90 - component percent = 90 - taxonomic classification name = Fine-silty, mixed, active, thermic Aquic Hapludalfs - drainage class = Moderately well drained - elevation = 60 - slope = 1 - geomdesc = Riser
        Physical
          Thickness  ParticleSizeSand  ParticleSizeSilt  ParticleSizeClay  Rocks  BD       AirDry     LL15      DUL       SAT       KS
          200        59.3              23.2              17.5              0      1.50853  0.0597849  0.11957   0.222771  0.430743  792.288
          200        59.3              23.2              17.5              0      1.50853  0.0597849  0.11957   0.222771  0.430743  792.288
          200        63.1              19.4              17.5              0      1.58891  0.109675   0.109675  0.199535  0.400411  2012.256
          200        63.1              19.4              17.5              0      1.58891  0.109675   0.109675  0.199535  0.400411  2012.256
          200        63.1              19.4              17.5              0      1.58891  0.109675   0.109675  0.199535  0.400411  2012.256
          200        7.3               66.2              26.5              0      1.44366  0.164462   0.164462  0.352634  0.455222  792.288
          200        7.3               66.2              26.5              0      1.44366  0.164462   0.164462  0.352634  0.455222  792.288
          200        7.3               66.2              26.5              0      1.44366  0.164462   0.164462  0.352634  0.455222  792.288
          200        7.3               66.2              26.5              0      1.44366  0.164462   0.164462  0.352634  0.455222  792.288
          200        7.3               66.2              26.5              0      1.44366  0.164462   0.164462  0.352634  0.455222  792.288
          Rocks source: Calculated
          SoilCrop MaizeSoil
            LL=[0.11957, 0.11957, 0.109675, 0.109675, 0.109675, 0.164462, 0.164462, 0.164462, 0.164462, 0.164462]
            KL=[0.06, 0.0491238, 0.0402192, 0.0329287, 0.0269597, 0.0220728, 0.0180717, 0.0147958, 0.0121138, 0.00991793]
            XF=[1, 1, 1, 1, 1, 1, 1, 1, 1, 1]
          SoilCrop SoybeanSoil: same as Simulation.Field.Bosket (askew):568730.Physical.MaizeSoil
          SoilCrop WheatSoil: same as Simulation.Field.Bosket (askew):568730.Physical.MaizeSoil
        WaterBalance SoilWater: SummerDate=1-Nov; SummerU=5; SummerCona=5; WinterDate=1-Apr; WinterU=5; WinterCona=5; DiffusConst=40; DiffusSlope=16; Salb=0.12; CN2Bare=73; CNRed=20; CNCov=0.8; PSIDul=-100; Thickness=[50, 100, 150, 300, 400, 1000]; SWCON=[0.25, 0.25, 0.25, 0.25, 0.25, 0.25]
        Organic: FOMCNRatio=40; CarbonUnits=Total
          Thickness  Carbon    SoilCNRatio  FBiom       FInert    FOM
          200        1.16279   12           0.04        0.8       150
          200        1.16279   12           0.0327492   0.80804   122.81
          200        0.436047  12           0.0268128   0.816161  100.548
          200        0.436047  12           0.0219525   0.824364  82.3217
          200        0.436047  12           0.0179732   0.832649  67.3993
          200        0.436047  12           0.0147152   0.841017  55.1819
          200        0.436047  12           0.0120478   0.849469  45.1791
          200        0.436047  12           0.00986388  0.858007  36.9895
          200        0.436047  12           0.00807586  0.86663   30.2845
          200        0.436047  12           0.00661196  0.875339  24.7948
        Chemical: PHUnits=Water
          Thickness  PH   CEC
          200        6.5  9.96528
          200        6.5  9.96528
          200        6.5  9.96528
          200        6.5  9.96528
          200        6.5  9.96528
          200        6.5  9.96528
          200        6.5  8.80207
          200        6.5  8.80207
          200        6.5  8.80207
          200        6.5  8.80207
          CEC source: Calculated
        Water: Thickness=[200, 200, 200, 200, 200, 200, 200, 200, 200, 200]; FilledFromTop=false
          InitialValues=[0.222771, 0.222771, 0.199535, 0.199535, 0.199535, 0.352634, 0.352634, 0.352634, 0.352634, 0.352634]
        Nutrient
        Solute NO3: Thickness=[200, 200, 200, 200, 200, 200, 200, 200, 200, 200]; InitialValuesUnits=ppm; WaterTableConcentration=0; D0=0; DepthConstant=0; MaxDepthSoluteAccessible=0; RunoffEffectivenessAtMovingSolute=0; MaxEffectiveRunoff=0
          InitialValues=[0.5, 0.495025, 0.490099, 0.485223, 0.480395, 0.475615, 0.470882, 0.466197, 0.461558, 0.456966]
        Solute NH4: Thickness=[200, 200, 200, 200, 200, 200, 200, 200, 200, 200]; InitialValuesUnits=ppm; WaterTableConcentration=0; D0=0; DepthConstant=0; MaxDepthSoluteAccessible=0; RunoffEffectivenessAtMovingSolute=0; MaxEffectiveRunoff=0
          InitialValues=[0.05, 0.0495025, 0.0490099, 0.0485223, 0.0480395, 0.0475615, 0.0470882, 0.0466197, 0.0461558, 0.0456966]
        Solute Urea: Thickness=[150, 150, 300, 300, 300, 300, 300]; InitialValues=[0, 0, 0, 0, 0, 0, 0]; InitialValuesUnits=kg/ha; WaterTableConcentration=0; D0=0; DepthConstant=0; MaxDepthSoluteAccessible=0; RunoffEffectivenessAtMovingSolute=0; MaxEffectiveRunoff=0
        SoilTemperature Temperature
      Manager Automatic irrigation based on water deficit
        Crop = [Soybean]
        AutoIrrigationOn = True
        FASWThreshold = 0.9
        FASWDepth = 600
        weeks = 1
        afterSowing = 0
```csharp
using APSIM.Numerics;
using Models.Interfaces;
using APSIM.Shared.Utilities;
using System.Xml.Serialization;
using Models;
using Models.PMF;
using Models.Soils;
using System.Text;
using System.Collections.Generic;
using Models.Core;
using System.Linq;
using System;
using Models.Interfaces;
namespace Models
{
    [Serializable] 
    public class Script : Model
    {
        [Link] private Zone zone;
        [Link] private Irrigation irrigation;
        [Link] private ISoilWater waterBalance;
        [Link] private IPhysical soilPhysical;
        public double FASW { get; set; }
        public double WaterDeficit  { get; set; }
    


        [Description("Crop to irrigate")]
        public IPlant Crop { get; set; }
        
        [Description("Auto irrigation on?")]
        public bool AutoIrrigationOn { get; set; }

        [Description("Threshold fraction available water (0-1)")]
        public double FASWThreshold { get; set; }

        [Description("Soil depth (mm) to which fraction available water is calculated")]
        public double FASWDepth { get; set; }

        [Description("Minimum weeks between irrigations")]
        public double weeks { get; set; }

        [Description("Minimum days after sowing for first irrigation")]
        public int afterSowing { get; set; }

        private double irrigationGap = 0;    // gap between irrigations

        /// <summary>Called at start of simulation. Performs some basic error checking. </summary>
        [EventSubscribe("StartOfSimulation")]
        private void ErrorChecking(object sender, EventArgs args)
        {
            if (Crop == null)
                throw new Exception("No crop was specified in script " + Parent.Name);
        }

        [EventSubscribe("DoManagement")]
        private void OnDoManagement(object sender, EventArgs e)
        {
            if (AutoIrrigationOn && Crop.IsAlive)
            {
                   irrigationGap += 1;                // increment gap between irrigations
                CalculateFASW();                // calc FASW and WaterDeficit
                if ((FASW < FASWThreshold) && (irrigationGap >= weeks * 7))
                {
                    irrigation.Apply(WaterDeficit, depth: 0);
                    irrigationGap = 0;            // reset
                }
            }
            else
            {
                irrigationGap = weeks * 7 - afterSowing - 1;    // allow irrigation a number of days after it becomes alive/sown
            }
        }

        // Calculate the fraction of the potential available sw
        // Calculate the deficit amount from DUL
        private void CalculateFASW()
        {
            double[] LL15 = MathUtilities.Multiply(soilPhysical.LL15, soilPhysical.Thickness);
            double[] DUL = MathUtilities.Multiply(soilPhysical.DUL, soilPhysical.Thickness);
        
            int nlayr = GetLayerIndex(FASWDepth);
            nlayr = Math.Min(nlayr, soilPhysical.Thickness.Length-1);
            double cumdep = MathUtilities.Sum(soilPhysical.Thickness, 0, nlayr, 0.0);    // tricky function that sums up to before nlayr

            double part_layer = MathUtilities.Divide((FASWDepth - cumdep), soilPhysical.Thickness[nlayr], 0.0);

            // note that results may be strange if swdep < ll15
            double avail_sw = (MathUtilities.Sum(waterBalance.SWmm, 0, nlayr, 0.0) + part_layer * waterBalance.SWmm[nlayr])
                            - (MathUtilities.Sum(LL15, 0, nlayr, 0.0) + part_layer * LL15[nlayr]);

            double pot_avail_sw = (MathUtilities.Sum(DUL, 0, nlayr, 0.0) + part_layer * DUL[nlayr])
                                - (MathUtilities.Sum(LL15, 0, nlayr, 0.0) + part_layer * LL15[nlayr]);
            
            FASW = MathUtilities.Divide(avail_sw, pot_avail_sw, 0.0);
            WaterDeficit = MathUtilities.Constrain(pot_avail_sw - avail_sw, 0.0, 100000);
        }

        // Get index of the layer that has this depth in it 
        private int GetLayerIndex(double pointDepth)
        {
            double[] cumThickness = soilPhysical.ThicknessCumulative;
            int layerIdx = 0;
            while ((layerIdx < cumThickness.Length) && (pointDepth > cumThickness[layerIdx]))
            {
                layerIdx += 1;
            }

            return layerIdx;
        }
    }
}
```
      Irrigation
      SurfaceOrganicMatter: InitialResidueName=maize; InitialResidueType=maize; InitialResidueMass=100; InitialStandingFraction=0; InitialCPR=0; InitialCNR=55
      MicroClimate: a_interception=0; b_interception=1; c_interception=0; d_interception=0; SoilHeatFluxFraction=0.4; MinimumHeightDiffForNewLayer=0; NightInterceptionFraction=0.5; ReferenceHeight=2
      Manager SowingFertiliser
        Amount = 10
        CropName = soybean
```csharp
using Models.Soils;
using System;
using Models.Core;
using Models.PMF;
namespace Models
{
    [Serializable]
    public class Script : Model
    {
        [Link] Clock Clock;
        [Link] Fertiliser Fertiliser;
        [Link] Summary Summary;
        
        
        [Description("Amount of fertiliser to be applied (kg/ha)")]
        public double Amount { get; set;}
        
        [Description("Crop to be fertilised")]
        public string CropName { get; set;}
        
        
        

        [EventSubscribe("Sowing")]
        private void OnSowing(object sender, EventArgs e)
        {
            Model crop = sender as Model;
            if (crop.Name.ToLower()==CropName.ToLower())
                Fertiliser.Apply(amount: Amount, type: "NO3N");
        }
        
    }
}
```
      Manager Harvesting
```csharp
using Models.PMF.Phen;
using APSIM.Shared.Utilities;
using System.Xml.Serialization;
using Models;
using Models.PMF;
using Models.Soils;
using System.Text;
using System.Collections.Generic;
using Models.Core;
using System;
using Models.Soils.Nutrients;

namespace Models
{
    [Serializable] 
    public class Script : Model
    {
        [Link] private Plant Soybean;
        [Link] private Zone zone;
        [Link(Type = LinkType.Path, Path = "[Soybean].Phenology")]
        private Phenology phenology;
                    
        
        [EventSubscribe("StartOfSimulation")]
        private void OnSimulationCommencing(object sender, EventArgs e)
        {
        }
        
        [EventSubscribe("DoManagement")]
        private void OnDoManagement(object sender, EventArgs e)
        {
            if (phenology.CurrentPhase.Name == "ReadyForHarvesting")
            {
                Soybean.Harvest();
                Soybean.EndCrop();
            }
        }
        
        [EventSubscribe("DoManagementCalculations")]
        private void OnDoManagementCalculations(object sender, EventArgs e)
        {
            
        }
    }
}
```
      Manager Sowing
        Crop = [Soybean]
        SowDate = Jun-06
        CultivarName = Elli_early7
        SowingDepth = 15
        RowSpacing = 380
        Population = 25
```csharp
using APSIM.Shared.Utilities;
using Models.Utilities;
using Models.Soils;
using Models.PMF;
using Models.Core;
using System;
using System.Linq;

namespace Models
{
    [Serializable]
    public class Script : Model
    {
        [Link] Clock Clock;
        [Link] Fertiliser Fertiliser;
        [Link] Summary Summary;
        [Link] Soil Soil;
        
        [Description("Crop")]
        public IPlant Crop { get; set; }

        [Description("Sowing date (d-mmm)")]
        public string SowDate { get; set; }

        [Display(Type = DisplayType.CultivarName)]
        [Description("Cultivar to be sown")]
        public string CultivarName { get; set; }

        [Description("Sowing depth (mm)")]
        public double SowingDepth { get; set; }

        [Description("Row spacing (mm)")]
        public double RowSpacing { get; set; }

        [Description("Plant population (/m2)")]
        public double Population { get; set; }

        [EventSubscribe("DoManagement")]
        private void OnDoManagement(object sender, EventArgs e)
        {
            if (DateUtilities.WithinDates(SowDate, Clock.Today, SowDate))
            {
                Crop.Sow(population: Population, cultivar: CultivarName, depth: SowingDepth, rowSpacing: RowSpacing);    
            }
        }
    }
}
```
      Plant Soybean
        Folder Elli
          Cultivar Generic_MG5_LongRep
            Command:
              [Phenology].Vegetative.Target.FixedValue = 340
              [Phenology].EarlyFlowering.Target.FixedValue = 70
              [Phenology].EarlyGrainFilling.Target.FractionofGrainfilling.FixedValue = 0.072
              [Phenology].LateGrainFilling.Target.EntireGrainfillPeriod.FixedValue = 650
              [Phenology].VegetativePhotoperiodModifier.XYPairs.X = 12.83, 16.13
              [Phenology].ReproductivePhotoperiodModifier.XYPairs.X = 12.83, 16.13
              [Leaf].AreaLargestLeaf.FixedValue=0.007
              [Leaf].Photosynthesis.RUE.FixedValue=1.25
          Cultivar PurcellMG4
            Command:
              [Phenology].Vegetative.Target.FixedValue = 340
              [Phenology].EarlyFlowering.Target.FixedValue = 140
              [Phenology].EarlyGrainFilling.Target.FractionofGrainfilling.FixedValue = 0.324
              [Phenology].LateGrainFilling.Target.EntireGrainfillPeriod.FixedValue = 540
              [Phenology].VegetativePhotoperiodModifier.XYPairs.X = 13.1, 16.49
              [Phenology].ReproductivePhotoperiodModifier.XYPairs.X = 13.1, 16.49
              [Leaf].AreaLargestLeaf.FixedValue=0.007
              [Leaf].Photosynthesis.RUE.FixedValue=1.25
          Cultivar PurcellMG5
            Command:
              [Phenology].Vegetative.Target.FixedValue = 370
              [Phenology].EarlyFlowering.Target.FixedValue = 100
              [Phenology].EarlyGrainFilling.Target.FractionofGrainfilling.FixedValue = 0.072
              [Phenology].LateGrainFilling.Target.EntireGrainfillPeriod.FixedValue = 580
              [Phenology].VegetativePhotoperiodModifier.XYPairs.X = 12.83, 16.13
              [Phenology].ReproductivePhotoperiodModifier.XYPairs.X = 12.83, 16.13
              [Leaf].AreaLargestLeaf.FixedValue=0.007
              [Leaf].Photosynthesis.RUE.FixedValue=1.25
          Cultivar PurcellMG6
            Command:
              [Phenology].Vegetative.Target.FixedValue = 390
              [Phenology].EarlyFlowering.Target.FixedValue = 100
              [Phenology].EarlyGrainFilling.Target.FractionofGrainfilling.FixedValue = 0.056
              [Phenology].LateGrainFilling.Target.EntireGrainfillPeriod.FixedValue = 580
              [Phenology].VegetativePhotoperiodModifier.XYPairs.X = 12.7, 16.05
              [Phenology].ReproductivePhotoperiodModifier.XYPairs.X = 12.7, 16.05
              [Leaf].AreaLargestLeaf.FixedValue=0.007
              [Leaf].Photosynthesis.RUE.FixedValue=1.25
        Folder ElliOpt
          Cultivar Elli_MG4: same as Replacements.Soybean.Cultivars.Generic.Generic_MG4
          Cultivar Elli_MG4opt
            Command:
              [Phenology].Vegetative.Target.FixedValue = 347
              [Phenology].EarlyFlowering.Target.FixedValue = 105
              [Phenology].EarlyGrainFilling.Target.FractionofGrainfilling.FixedValue = 0.324
              [Phenology].LateGrainFilling.Target.EntireGrainfillPeriod.FixedValue = 747
              [Phenology].Maturing.Target.FixedValue = 28
              [Phenology].VegetativePhotoperiodModifier.XYPairs.X = 13.1, 16.49
              [Phenology].ReproductivePhotoperiodModifier.XYPairs.X = 13.1, 16.49
          Cultivar early1
            Command:
              [Phenology].Vegetative.Target.FixedValue = 340
              [Phenology].EarlyFlowering.Target.FixedValue = 105
              [Phenology].EarlyGrainFilling.Target.FractionofGrainfilling.FixedValue = 0.324
              [Phenology].LateGrainFilling.Target.EntireGrainfillPeriod.FixedValue = 747
              [Phenology].Maturing.Target.FixedValue = 28
              [Phenology].VegetativePhotoperiodModifier.XYPairs.X = 13.1, 16.49
              [Phenology].ReproductivePhotoperiodModifier.XYPairs.X = 13.1, 16.49
      Report: EventNames=[Clock].EndOfDay
        VariableNames:
          [Clock].Today
          [Soybean].Phenology.CurrentPhaseName
          [Soybean].Phenology.CurrentStageName
          [Soybean].Phenology.Stage
          [Soybean].LAI
